# OpenSim document version 40500
Model:
  Ground
  BodySet:
    Body Ball_1: mass=1 [kg] mass_center=(0 0 0) inertia=(0 0 0 0 0 0)
      Sphere Ball_1_geom_1: radius=0.1
  JointSet:
    PinJoint Pin_JointA: socket_parent_frame=ground_offset socket_child_frame=Ball_1_offset
      Coordinate Fixed
      PhysicalOffsetFrame ground_offset: socket_parent=/ground translation=(0 0 0) [meters]
      PhysicalOffsetFrame Ball_1_offset: socket_parent=/bodyset/Ball_1 translation=(0.5 0.5 0)
  ControllerSet:
    PrescribedController: actuator_list=Rotator
      FunctionSet ControlFunctions:
        Sine: amplitude=0.5 omega=0.5 [radians/sec] phase=0 offset=0
  ForceSet:
    CoordinateActuator Rotator: coordinate=Fixed
