# OpenSim document version 40500
Model:
  Ground
  BodySet:
    Body: mass=1 [kg] mass_center=(0 0 0) inertia=(0 0 0 0 0 0)
      Sphere body_geom_1: radius=0.1
  JointSet:
    SliderJoint sldr_jnt: socket_parent_frame=/ground socket_child_frame=/bodyset/body
      Coordinate translation
  ControllerSet:
    PrescribedController: actuator_list=actuator
      FunctionSet ControlFunctions:
        Sine
  ForceSet:
    CoordinateActuator actuator: coordinate=translation
